// COMSOL Multiphysics 6.4.0.378 model "NavierStokesIsothermalObstacle.mph"
// Outline of the model tree

Parameters
  rho = 0.8018
  visc = 2.3460e-05
  g = 0
  Re = rho*0.001*1/visc

Geometry
  geom1 "Geometry 1" (2D, length unit m)
    r1: Rectangle | size = {4, 1}; pos = {0, -0.5}
    c1: Circle | r = 0.1; pos = {0.5, 0}
    dif1: Difference | input = r1; input2 = c1
    fin: Finalize "Form Union"

Physics
  spf: LaminarFlow on all domains
    dependent variable u = {u, v, w}
    dependent variable p
    ShapeProperty.order_fluid = 2
    fp1: FluidProperties (default) | rho_mat = userdef; rho = rho; mu_mat = userdef; mu = visc
    init1: init "Initial Values 1" (default)
    wallbc1: WallBC "Wall 1" (default)
    inl1: InletBoundary "Inlet 1" on boundaries 1
      ComponentWise = VelocityFieldComponentWise
      u0 = {0.001*(1-4*y^2), 0, 0}
    out1: OutletBoundary "Outlet 1" on boundaries 4 | NormalFlow = 1; SuppressBackflow = 0

Mesh
  mesh1 "Mesh 1" (physics-controlled)
    size: MeshSizeDefault | table = cfd; hauto = 2

Studies
  std1 "Study 1"
    stat: Stationary

Solver configurations
  sol1 "Solution 1" (study std1)
    v1: Variables "Dependent Variables 1"
    s1: Stationary "Stationary Solver 1"
      fc1: FullyCoupled | linsolver = d1; initstep = 0.01; maxiter = 100
      d1: Direct "Direct, fluid flow variables (spf)" | linsolver = pardiso; pivotperturb = 1.0E-13

Datasets
  dset1: Solution | solution = sol1
  cln1: CutLine2D | data = dset1; genpoints = {{0.5, -1}, {0.5, 1}}

Derived values
  max1: MaxSurface "Surface Maximum 1" on domains 1 | data = dset1; table = tbl1; expr = sqrt(u^2+v^2)
  min1: MinSurface "Surface Minimum 1" on domains 1 | data = dset1; table = new; expr = sqrt(u^2+v^2)
  max2: MaxLine "Line Maximum 2" on boundaries 1 | data = dset1; table = new; expr = u
  max3: MaxSurface "Surface Maximum 3" on domains 1 | data = dset1; table = tbl2; expr = u

Plots
  pg4: PlotGroup2D "Velocity Magnitude" | data = dset1
    surf1: Surface | expr = spf.U
    con1: Contour | expr = spf.U
  pg5: PlotGroup2D "Pressure" | data = dset1
    surf1: Surface | expr = p
  pg6: PlotGroup1D "1D Plot Group 6" | data = dset1
    lngr1: LineGraph | data = cln1; expr = spf.U

Exports
  data1: Data
    data = dset1
    expr = {spf.U, p, }
    filename = C:\Users\stath\Documents\Διπλωματική Εργασία\Final Versions of MATLAB Files\NavierStokesIsothermalObstacle\NavierStokesIsothermalObstacle.txt
    location = grid
    gridx2 = range(0,0.008,4)
    gridy2 = range(-0.5,0.002,0.5)