// COMSOL Multiphysics 6.4.0.378 model "NavierStokesNonIsothermalObstacleInference.mph"
// Outline of the model tree

Parameters
  visc = 2.3460e-05
  g = 0
  k = 0.0338
  Cp = 1.0520e+03
  MW = 28*10^-3
  Twall = 298
  Tobst = 400

Geometry
  geom1 "Geometry 1" (2D, length unit m)
    r1: Rectangle | size = {4, 1}; pos = {0, -0.5}
    c1: Circle | r = 0.1; pos = {0.5, 0}
    dif1: Difference | input = r1; input2 = c1
    fin: Finalize "Form Union"

Physics
  spf: LaminarFlow on all domains
    dependent variable u = {u, v, w}
    ShapeProperty.order_fluid = 2
    PhysicalModelProperty.Compressibility = WeaklyCompressible
    PhysicalModelProperty.pref = 1.013*10^5
    ConsistentStabilization.StreamlineDiffusion = 0
    AdvancedSettingProperty.UsePseudoTime = 1
    fp1: FluidProperties (default) | mu_mat = userdef; mu = visc
    init1: init "Initial Values 1" (default)
    wallbc1: WallBC "Wall 1" (default)
    inl1: InletBoundary "Inlet 1" on boundaries 1
      ComponentWise = VelocityFieldComponentWise
      u0 = {0.001*(1-4*y^2), 0, 0}
    out1: OutletBoundary "Outlet 1" on boundaries 4 | NormalFlow = 1; SuppressBackflow = 0
  ht: HeatTransferInFluids on all domains
    dependent variable T
    ShapeProperty.order_temperature = 2
    ShapeProperty.boundaryFluxSmooth_temperature = 0
    PhysicalModelProperty.dz = 1[m]
    ConsistentStabilization.heatStreamlineDiffusion = 0
    fluid1: FluidHeatTransferModel "Fluid 1" (default)
      gasConstantType = numberAve
      heatcapacity_mat = userdef
      heatcapacity = Cp
      molarmass_mat = userdef
      molarmass = MW
      k_mat = userdef
      k = k
      fluidType = idealGas
    init1: init "Initial Values 1" (default)
    ins1: ThermalInsulation (default)
    temp1: TemperatureBoundary "Temperature 1" on boundaries 1-3 | T0 = Twall
    temp2: TemperatureBoundary "Temperature 2" on boundaries 5-8 | T0 = Tobst

Multiphysics
  nitf1: NonIsothermalFlow on all domains | includeViscousDissipation = 0; Fluid_physics = spf; Heat_physics = ht

Mesh
  mesh1 "Mesh 1" (physics-controlled)
    size: MeshSizeDefault | table = cfd; hauto = 3

Studies
  std1 "Study 1"
    stat: Stationary | useinitsol = on; initmethod = sol; initstudy = std1

Solver configurations
  sol1 "Solution 1" (study std1)
    v1: Variables "Dependent Variables 1"
    s1: Stationary "Stationary Solver 1"
      se1: Segregated
        maxsegiter = 200
        segstabacc = segcflcmp
        segcfltech = interp
        subkipid = 0.15
        subkdpid = 0.15
        subcfltol = 0.2
        segcflaa = on
        segcflaacfl = 9000
        segcflaafact = 1
        ss1: SegregatedStep "Velocity u, Pressure p"
          segvar = {comp1_p, comp1_u}
          linsolver = d1
          subdamp = 0.5
          subadapttol = on
        ss2: SegregatedStep "Temperature" | segvar = {comp1_T}; linsolver = d2; subdamp = 0.5
        ll1: LowerLimit | lowerlimit = comp1.T 0
      d1: Direct "Direct, fluid flow variables (spf)" | linsolver = pardiso; pivotperturb = 1.0E-13
      d2: Direct "Direct, heat transfer variables (ht)" | linsolver = pardiso; pivotperturb = 1.0E-13

Datasets
  dset1: Solution | solution = sol1
  cln1: CutLine2D | data = dset1; genpoints = {{0.5, -1}, {0.5, 1}}
  cpt1: CutPoint2D | data = dset1; method = grid; gridx = range(0.75,0.375,2.25); gridy = 0

Derived values
  max1: MaxSurface "Surface Maximum 1" on domains 1 | data = dset1; table = tbl1; expr = sqrt(u^2+v^2)
  min1: MinSurface "Surface Minimum 1" on domains 1 | data = dset1; table = new; expr = sqrt(u^2+v^2)
  max2: MaxLine "Line Maximum 2" on boundaries 1 | data = dset1; table = new; expr = u
  max3: MaxSurface "Surface Maximum 3" on domains 1 | data = dset1; table = tbl2; expr = u

Plots
  pg4: PlotGroup2D "Velocity Magnitude" | data = dset1
    surf1: Surface | expr = spf.U
    con1: Contour | expr = spf.U
  pg5: PlotGroup2D "Pressure" | data = dset1
    surf1: Surface | expr = p
  pg6: PlotGroup2D "Temperature" | data = dset1
    surf1: Surface | expr = T
    con1: Contour | expr = T
  pg7: PlotGroup2D "Density" | data = dset1
    surf1: Surface | expr = spf.rho; descr = Density
  pg8: PlotGroup1D "1D Plot Group 8" | data = cln1
    lngr1: LineGraph | expr = spf.U

Exports
  data1: Data
    data = dset1
    expr = {spf.U, p, T, spf.rho}
    filename = C:\Users\stath\Documents\Διπλωματική Εργασία\Final Versions of MATLAB Files\NavierStokesNonIsothermalObstacle\NavierStokesNonIsothermalObstacleInference.txt
    location = grid
    gridx2 = range(0,0.008,4)
    gridy2 = range(-0.5,0.002,0.5)
  data2: Data
    data = cpt1
    expr = T
    filename = C:\Users\stath\Documents\Διπλωματική Εργασία\Final Versions of MATLAB Files\NavierStokesNonIsothermalObstacleInference\TData.txt